// SBML level 2 version 3
// Generated 01-Dec-2011 12:45:15 (GMT-07:60)
// Generated by MathSBML 2.10.1 [11-Feb-2011]
// Generated using Mathematica Version 8.0 for Mac OS X x86 (64-bit) (November 6, 2010)

model Glycolysis()
  // This is a Systems Biology Markup Language (SBML) file, generated by MathSBML 2.10.1 [11-Feb-2011] 01-Dec-2011 12:45:14 (GMT-07:60). SBML is a form of XML, and most XML files will not display properly in an internet browser. To view the contents of an XML file use the "Page Source" or equivalent button on you browser.

  // Compartments:
  compartment c; c has volume;

  // Species:
  species M_glu_c in c = 1;
  species M_g6p_c in c = 0.0486;
  species M_f6p_c in c = 0.0198;
  species M_fdp_c in c = 0.0146;
  species M_dhap_c in c = 0.16;
  species M_gap_c in c = 0.00728;
  species M_pg13_c in c = 0.000243;
  species M_pg3_c in c = 0.0773;
  species M_pg2_c in c = 0.0113;
  species M_pep_c in c = 0.017;
  species M_pyr_c in c = 0.060301;
  species M_lac_c in c = 1.36;
  species M_nad_c in c = 0.0589;
  species M_amp_c in c = 0.08672812;
  species M_adp_c in c = 0.29;
  species M_atp_c in c = 1.6;
  species M_h_c in c = 8.997573e-5;
  species M_h2o_c in c = 1;
  species M_nadh_c in c = 0.0301;
  species M_phos_c in c = 2.5;

  // Reactions:
  R_vhk: M_glu_c + M_atp_c -> M_g6p_c + M_adp_c + M_h_c; k_vhk_fwd*(M_atp_c*M_glu_c + (-1*M_adp_c*M_g6p_c*M_h_c*Keq_vhk^(-1)));
    Keq_vhk = 850;
  R_vpgi: M_g6p_c -> M_f6p_c; k_vpgi_fwd*(M_g6p_c + (-1*M_f6p_c*Keq_vpgi^(-1)));
    Keq_vpgi = 0.41;
  R_vpfk: M_f6p_c + M_atp_c -> M_fdp_c + M_adp_c + M_h_c; k_vpfk_fwd*(M_atp_c*M_f6p_c + (-1*M_adp_c*M_fdp_c*M_h_c*Keq_vpfk^(-1)));
    Keq_vpfk = 310;
  R_vtpi: M_dhap_c -> M_gap_c; k_vtpi_fwd*(M_dhap_c + (-1*M_gap_c*Keq_vtpi^(-1)));
    Keq_vtpi = 0.05714286;
  R_vald: M_fdp_c -> M_dhap_c + M_gap_c; k_vald_fwd*(M_fdp_c + (-1*M_dhap_c*M_gap_c*Keq_vald^(-1)));
    Keq_vald = 0.082;
  R_vgapdh: M_gap_c + M_nad_c + M_phos_c -> M_pg13_c + M_h_c + M_nadh_c; k_vgapdh_fwd*(M_gap_c*M_nad_c*M_phos_c + (-1*M_h_c*M_nadh_c*M_pg13_c*Keq_vgapdh^(-1)));
    Keq_vgapdh = 0.0179;
  R_vpgk: M_pg13_c + M_adp_c -> M_pg3_c + M_atp_c; k_vpgk_fwd*(M_adp_c*M_pg13_c + (-1*M_atp_c*M_pg3_c*Keq_vpgk^(-1)));
    Keq_vpgk = 1800;
  R_vpglm: M_pg3_c -> M_pg2_c; k_vpglm_fwd*(M_pg3_c + (-1*M_pg2_c*Keq_vpglm^(-1)));
    Keq_vpglm = 0.1470588;
  R_veno: M_pg2_c -> M_pep_c + M_h2o_c; k_veno_fwd*(M_pg2_c + (-1*M_h2o_c*M_pep_c*Keq_veno^(-1)));
    Keq_veno = 1.694915;
  R_vpk: M_pep_c + M_adp_c + M_h_c -> M_pyr_c + M_atp_c; k_vpk_fwd*(M_adp_c*M_h_c*M_pep_c + (-1*M_atp_c*M_pyr_c*Keq_vpk^(-1)));
    Keq_vpk = 363000;
  R_vldh: M_pyr_c + M_h_c + M_nadh_c -> M_lac_c + M_nad_c; k_vldh_fwd*(M_h_c*M_nadh_c*M_pyr_c + (-1*M_lac_c*M_nad_c*Keq_vldh^(-1)));
    Keq_vldh = 26300;
  R_vamp: M_amp_c -> ; k_vamp_fwd*(M_amp_c + (-1*M_amp_Xt*Keq_vamp^(-1)));
    Keq_vamp = INF;
  R_vapk: 2 M_adp_c -> M_amp_c + M_atp_c; k_vapk_fwd*(M_adp_c^2 + (-1*M_amp_c*M_atp_c*Keq_vapk^(-1)));
    Keq_vapk = 1.65;
  R_vpyr: M_pyr_c -> ; k_vpyr_fwd*(M_pyr_c + (-1*M_pyr_Xt*Keq_vpyr^(-1)));
    Keq_vpyr = 1;
  R_vlac: M_lac_c -> ; k_vlac_fwd*(M_lac_c + (-1*1*Keq_vlac^(-1)));
    Keq_vlac = 1;
  R_vatp: M_atp_c + M_h2o_c -> M_adp_c + M_h_c + M_phos_c; k_vatp_fwd*(M_atp_c*M_h2o_c + (-1*M_adp_c*M_h_c*M_phos_c*Keq_vatp^(-1)));
    Keq_vatp = INF;
  R_vnadh: M_nadh_c -> M_nad_c + M_h_c; k_vnadh_fwd*(M_nadh_c + (-1*M_h_c*M_nad_c*Keq_vnadh^(-1)));
    Keq_vnadh = INF;
  R_vgluin: -> M_glu_c; k_vgluin_fwd*(1 + (-1*M_glu_c*Keq_vgluin^(-1)));
    Keq_vgluin = INF;
  R_vampin: -> M_amp_c; k_vampin_fwd*(M_amp_Xt + (-1*M_amp_c*Keq_vampin^(-1)));
    Keq_vampin = INF;
  R_vh: M_h_c -> ; k_vh_fwd*(M_h_c + (-1*1*Keq_vh^(-1)));
    Keq_vh = 1;
  R_vh2o: M_h2o_c -> ; k_vh2o_fwd*(M_h2o_c + (-1*1*Keq_vh2o^(-1)));
    Keq_vh2o = 1;
end
